variable cutoff index 12

units       real
dimension   3
boundary    p p p

atom_style  full

pair_style lj/cut/coul/long ${cutoff}
kspace_style pppm 1.0e-5
pair_modify     table 0

read_data       ./initialMD.data

group co2 type 1 2
group groupC type 1
group groupO type 2
group n2 type 3 4
group groupX type 3
group groupN type 4


# --------------------- defining the potential (TraPPE) ---------------------

dielectric   1.0

pair_modify shift yes

pair_coeff 1 1 0.053654828567 2.8000
pair_coeff 2 2 0.156990053954 3.0500
pair_coeff 3 3 0.0 0.0
pair_coeff 4 4 0.07153943229  3.31

pair_coeff 1 2 0.091778398502 2.9250
pair_coeff 1 3 0.0 0.0
pair_coeff 1 4 0.06195511258 3.055
pair_coeff 2 3 0.0 0.0
pair_coeff 2 4 0.10597631497 3.18
pair_coeff 3 4 0.0 0.0

# --------------------- simulation/thermostat details ---------------------

neighbor 2.0 bin
neigh_modify delay 5 every 1 check yes

run_style verlet

timestep      0.5 # for equilibration, later set to 1.0

variable      temperature equal 375

variable      timeequil equal  80000
variable      timerun equal   2000000
variable      tdamp equal  200.0


# --------------------- output style ---------------------

thermo           10000
thermo_style     custom step temp pe ke enthalpy lx vol press
thermo_modify flush yes


# --------------------- initialise  ---------------------

velocity all create ${temperature} 432567 dist uniform loop geom

fix NVT all rigid/nvt molecule temp ${temperature} ${temperature} ${tdamp}


# --------------------- add external potential  ---------------------

# no external potential

# --------------------- run equilibration  ---------------------

run          ${timeequil}

reset_timestep 0
timestep 1.0

# --------------------- collect trajectory  ---------------------


dump 1 all custom 10000 md.lammpstrj id type xu yu zu

# ------------------------------- run -----------------------------

run          ${timerun}
